# OpenSim document version 40600
Model simplified_human_25dof_v6:
  Ground
  BodySet:
    Body pelvis: mass=1 [kg] mass_center=(0 0 0) inertia=(1 1 1 0 0 0)
    Body torso: mass=1 mass_center=(0 0 0) inertia=(1 1 1 0 0 0)
    Body upperarm_l: mass=1 mass_center=(0 0 0) inertia=(1 1 1 0 0 0)
    Body forearm_l: mass=1 mass_center=(0 0 0) inertia=(1 1 1 0 0 0)
    Body thigh_l: mass=1 mass_center=(0 0 0) inertia=(1 1 1 0 0 0)
    Body shank_l: mass=1 mass_center=(0 0 0) inertia=(1 1 1 0 0 0)
    Body upperarm_r: mass=1 mass_center=(0 0 0) inertia=(1 1 1 0 0 0)
    Body forearm_r: mass=1 mass_center=(0 0 0) inertia=(1 1 1 0 0 0)
    Body thigh_r: mass=1 mass_center=(0 0 0) inertia=(1 1 1 0 0 0)
    Body shank_r: mass=1 mass_center=(0 0 0) inertia=(1 1 1 0 0 0)
  JointSet:
    FreeJoint root: socket_parent_frame=ground_offset socket_child_frame=pelvis_offset
      Coordinate root_0
      Coordinate root_1
      Coordinate root_2
      Coordinate root_3
      Coordinate root_4
      Coordinate root_5
      PhysicalOffsetFrame ground_offset: socket_parent=/ground translation=(0 0 0) [meters]
      PhysicalOffsetFrame pelvis_offset: socket_parent=/bodyset/pelvis translation=(0 0 0)
    BallJoint lumbar: socket_parent_frame=pelvis_offset socket_child_frame=torso_offset
      Coordinate lumbar_0: default_value=0 range=(-1.570796 1.570796) clamped=true
      Coordinate lumbar_1: default_value=0 range=(-1.396263 1.396263) clamped=true
      Coordinate lumbar_2: default_value=0 range=(-1.047198 1.047198) clamped=true
      PhysicalOffsetFrame pelvis_offset: socket_parent=/bodyset/pelvis translation=(0 0 0)
      PhysicalOffsetFrame torso_offset: socket_parent=/bodyset/torso translation=(0 0 0)
    BallJoint shoulder_l: socket_parent_frame=torso_offset socket_child_frame=upperarm_l_offset
      Coordinate shoulder_l_0: default_value=0 range=(-3.141593 1.047198) clamped=true
      Coordinate shoulder_l_1: default_value=0 range=(-1.745329 1.745329) clamped=true
      Coordinate shoulder_l_2: default_value=0 range=(-0.6981317 3.141593) clamped=true
      PhysicalOffsetFrame torso_offset: socket_parent=/bodyset/torso translation=(0.18 0.46 0)
      PhysicalOffsetFrame upperarm_l_offset: socket_parent=/bodyset/upperarm_l translation=(0 0 0)
    PinJoint elbow_l: socket_parent_frame=upperarm_l_offset socket_child_frame=forearm_l_offset
      Coordinate elbow_l_0: default_value=0.2617994 range=(0 2.70526) clamped=true
      PhysicalOffsetFrame upperarm_l_offset: socket_parent=/bodyset/upperarm_l translation=(0 -0.28 0)
          orientation=(0 -1.570796 0) [radians]
      PhysicalOffsetFrame forearm_l_offset: socket_parent=/bodyset/forearm_l translation=(0 0 0)
          orientation=(0 -1.570796 0)
    BallJoint hip_l: socket_parent_frame=pelvis_offset socket_child_frame=thigh_l_offset
      Coordinate hip_l_0: default_value=0 range=(-2.617994 0.7853982) clamped=true
      Coordinate hip_l_1: default_value=0 range=(-1.047198 1.047198) clamped=true
      Coordinate hip_l_2: default_value=0 range=(-0.6981317 1.396263) clamped=true
      PhysicalOffsetFrame pelvis_offset: socket_parent=/bodyset/pelvis translation=(0.11 0 0)
      PhysicalOffsetFrame thigh_l_offset: socket_parent=/bodyset/thigh_l translation=(0 0 0)
    PinJoint knee_l: socket_parent_frame=thigh_l_offset socket_child_frame=shank_l_offset
      Coordinate knee_l_0: default_value=0.2617994 range=(-0.08726646 2.879793) clamped=true
      PhysicalOffsetFrame thigh_l_offset: socket_parent=/bodyset/thigh_l translation=(0 -0.43 0)
          orientation=(0 1.570796 0)
      PhysicalOffsetFrame shank_l_offset: socket_parent=/bodyset/shank_l translation=(0 0 0) orientation=(0 1.570796 0)
    BallJoint shoulder_r: socket_parent_frame=torso_offset socket_child_frame=upperarm_r_offset
      Coordinate shoulder_r_0: default_value=0 range=(-3.141593 1.047198) clamped=true
      Coordinate shoulder_r_1: default_value=0 range=(-1.745329 1.745329) clamped=true
      Coordinate shoulder_r_2: default_value=0 range=(-3.141593 0.6981317) clamped=true
      PhysicalOffsetFrame torso_offset: socket_parent=/bodyset/torso translation=(-0.18 0.46 0)
      PhysicalOffsetFrame upperarm_r_offset: socket_parent=/bodyset/upperarm_r translation=(0 0 0)
    PinJoint elbow_r: socket_parent_frame=upperarm_r_offset socket_child_frame=forearm_r_offset
      Coordinate elbow_r_0: default_value=0.2617994 range=(0 2.70526) clamped=true
      PhysicalOffsetFrame upperarm_r_offset: socket_parent=/bodyset/upperarm_r translation=(0 -0.28 0)
          orientation=(0 -1.570796 0)
      PhysicalOffsetFrame forearm_r_offset: socket_parent=/bodyset/forearm_r translation=(0 0 0)
          orientation=(0 -1.570796 0)
    BallJoint hip_r: socket_parent_frame=pelvis_offset socket_child_frame=thigh_r_offset
      Coordinate hip_r_0: default_value=0 range=(-2.617994 0.7853982) clamped=true
      Coordinate hip_r_1: default_value=0 range=(-1.047198 1.047198) clamped=true
      Coordinate hip_r_2: default_value=0 range=(-1.396263 0.6981317) clamped=true
      PhysicalOffsetFrame pelvis_offset: socket_parent=/bodyset/pelvis translation=(-0.11 0 0)
      PhysicalOffsetFrame thigh_r_offset: socket_parent=/bodyset/thigh_r translation=(0 0 0)
    PinJoint knee_r: socket_parent_frame=thigh_r_offset socket_child_frame=shank_r_offset
      Coordinate knee_r_0: default_value=0.2617994 range=(-0.08726646 2.879793) clamped=true
      PhysicalOffsetFrame thigh_r_offset: socket_parent=/bodyset/thigh_r translation=(0 -0.43 0)
          orientation=(0 1.570796 0)
      PhysicalOffsetFrame shank_r_offset: socket_parent=/bodyset/shank_r translation=(0 0 0) orientation=(0 1.570796 0)
  MarkerSet:
    Marker LShoulder: torso (0.18 0.46 0)
    Marker LElbow: upperarm_l (0 -0.28 0)
    Marker LWrist: forearm_l (0 -0.25 0)
    Marker LHip: pelvis (0.11 0 0)
    Marker LKnee: thigh_l (0 -0.43 0)
    Marker LAnkle: shank_l (0 -0.43 0)
    Marker RShoulder: torso (-0.18 0.46 0)
    Marker RElbow: upperarm_r (0 -0.28 0)
    Marker RWrist: forearm_r (0 -0.25 0)
    Marker RHip: pelvis (-0.11 0 0)
    Marker RKnee: thigh_r (0 -0.43 0)
    Marker RAnkle: shank_r (0 -0.43 0)
